** Description:
** 	Simple 2d-cube model to show a pore pressure increase from hydrostatic to
** approx 4x-higher value. The pore pressure has been changed by a boundary
** condition on a point in the middle of the 2d-cube. In the first step
** (Step_Geostatic) the steady state will be established in the model. The
** second step (Step_PPChange) increases the pore pressure to 1000000 N/m² (4x
** high) over a duration of 1 day. A third step (Step_Rest) lasts 300 days to
** establish a steady state with the new boundary conditions.
** Cube_PP-Change_wPPBC has boundary conditions on top and bottom which keep the
** hydrostatic pressure: top = 0 N/m²; bottom = 490500 N/m²; A third boundary
** condition changes the pore pressure in the middle of the model. The results
** show, that the pore pressure increasing leads to a heave while the pore fluid
** is flowing through the model (consolidation). The pressure at the top and the
** bottom stay constant at the hydrostatic level (see BC). We have a pore
** pressure and a stress spot at the injection point.
**
** Abaqus:
** 	* version: Abaqus 2019
** 	* CAE build version: 2018_09_24-20.41.51 157541
**
** Modell:
** 	* 2-dimensional
** 	* units: kilogramm, meter, newton, seconds
** 	* standard solver
** 	* size: 50x50m
** 	* created by: Sven F. Biebricher
**
** Loads:
** 	* gravity: -9.81 m/s²
**
** Boundary Conditions:
** 	* x/y-axis-fix (u1;u2) on bottom
** 	* x-axis-fix (u1) on left and right sides
** 	* pore pressure: top = 0 N/m²; bottom = 490500 N/m²
**
** Materials:
** 	* Material_1:
** 		* density: 2000 kg/m³ (dry density)
** 		* elastic: young's modulus: 20000000 N/m²; poisson's ratio: 0.3
** 		* permeability: k = 1E-7; void ratio: 0.3
**
** Initial conditions:
** 	* geostatic stress: top = 0 N/m²; bottom = -603315 N/m²
** 	* pore pressure: hydrostatic pressure; top = 0 N/m²; bottom = 490500 N/m²
** 	* saturation: 1.0
** 	* void ratio: 1.0
**
** Mesh:
** 	* size: 1m x 1m
** 	* shape: quad only
** 	* element type: CPE8P
** 		* family: pore fluid/stress
** 		* geometric order: quadratic
** 		* reduced integration: off
**
** Steps:
** 	* step_geostatic:
** 		* geostatic
** 		* incrementation: fixed (defaults)
** 		* nlgeom: off
**
** 	* step_ChangePP:
** 		* soils
** 		* transient consolidation
** 		* period: 1 d (86400 s)
** 		* nlgeom: off
** 		* incrementation: automatic
** 		* max PP change per increment: 50000 N/m²
** 		* Increasing Pore Pressure:
** 			*BC_PP: 1E6 N/m²
**
** 	* step_Rest:
** 		* soils
** 		* transient consolidation
** 		* period: 300 d (25920000 s)
** 		* nlgeom: off
** 		* incrementation: automatic
** 		* max PP change per increment: 50000 N/m²
*Heading
** Job name: Cube_PP_SubRTest Model name: Cube_PP-Change_wPPBC
** Generated by: Abaqus/CAE 2019
*Preprint, echo=NO, model=NO, history=NO, contact=NO
**
** PARTS
**
*Part, name=Part_1
*Node
      1,          25.,           0.
      2,          25.,          25.
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*Element, type=CPE8P
  1,    1,   10,  298,  105, 2602, 2603, 2604, 2605
  2,   10,   11,  299,  298, 2606, 2607, 2608, 2603
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*Nset, nset=_PickedSet19, internal, generate
    1,  7701,     1
*Elset, elset=_PickedSet19, internal, generate
    1,  2500,     1
** Section: Section_1
*Solid Section, elset=_PickedSet19, material=Material_1
,
*End Part
**
**
** ASSEMBLY
**
*Assembly, name=Assembly
**
*Instance, name=Part_1-1, part=Part_1
*End Instance
**
*Nset, nset=Set-8, instance=Part_1-1
 2,
*Nset, nset=_PickedSet33, internal, instance=Part_1-1, generate
    1,  7701,     1
*Elset, elset=_PickedSet33, internal, instance=Part_1-1, generate
    1,  2500,     1
*Nset, nset=_PickedSet34, internal, instance=Part_1-1, generate
    1,  7701,     1
*Elset, elset=_PickedSet34, internal, instance=Part_1-1, generate
    1,  2500,     1
*Nset, nset=_PickedSet35, internal, instance=Part_1-1, generate
    1,  7701,     1
*Elset, elset=_PickedSet35, internal, instance=Part_1-1, generate
    1,  2500,     1
*Nset, nset=_PickedSet36, internal, instance=Part_1-1
    1,    4,    9,   82,   83,   84
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*Elset, elset=_PickedSet36, internal, instance=Part_1-1
    1,   26,   51,   76,  101,  126
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*Nset, nset=_PickedSet37, internal, instance=Part_1-1
    3,    4,    6,    7,    8,    9
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*Elset, elset=_PickedSet37, internal, instance=Part_1-1
  601,  602,  603,  604,  605,  606
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*Nset, nset=_PickedSet38, internal, instance=Part_1-1, generate
    1,  7701,     1
*Elset, elset=_PickedSet38, internal, instance=Part_1-1, generate
    1,  2500,     1
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*Nset, nset=_PickedSet49_PP_, internal, instance=Part_1-1
   1,   4,   9,  82,  83,  84
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*Nset, nset=_PickedSet48_PP_, internal, instance=Part_1-1
   5,   7,   8, 178, 179, 180
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*Nset, nset=_PickedSet47_PP_, internal, instance=Part_1-1
 2,
*End Assembly
*Amplitude, name=Amp-1
             0.,              1.,             10.,             1.5
**
** MATERIALS
**
*Material, name=Material_1
*Density
2000.,
*Elastic
 2e+07, 0.3
*Permeability, specific=9810.
 1e-07, 0.3
**
** INTERACTION PROPERTIES
**
*Surface Interaction, name=InteractionProp
1.,
*Friction
0.,
*Surface Behavior, pressure-overclosure=HARD
**
** BOUNDARY CONDITIONS
**
** Name: BC_all Type: Displacement/Rotation
*Boundary
_PickedSet36, 1, 1
_PickedSet36, 2, 2
_PickedSet36, 6, 6
** Name: BC_x Type: Displacement/Rotation
*Boundary
_PickedSet37, 1, 1
**
** PREDEFINED FIELDS
**
** Name: PreDef_GeostaticStress   Type: Geostatic stress
*Initial Conditions, type=STRESS, GEOSTATIC
_PickedSet38, 0., 50., -603315., 0., 0.5, 0.5
** Name: PreDef_PorePressure   Type: Pore pressure
*Initial Conditions, TYPE=PORE PRESSURE
_PickedSet33, 0., 50., 490500., 0.
** Name: PreDef_Saturation   Type: Saturation
*Initial Conditions, type=SATURATION
_PickedSet34, 1.
** Name: PreDef_VoidRatio   Type: Void ratio
*Initial Conditions, TYPE=RATIO
_PickedSet35, 0.3
** ----------------------------------------------------------------
**
** STEP: Step_Geostatic
**
*Step, name=Step_Geostatic, nlgeom=NO
*Geostatic
**
** BOUNDARY CONDITIONS
**
** Name: BC_PP_Bottom Type: Pore pressure
*Boundary
_PickedSet49_PP_, 8, 8, 490500.
** Name: BC_PP_Top Type: Pore pressure
*Boundary
_PickedSet48_PP_, 8, 8
**
** LOADS
**
** Name: Load_Gravity   Type: Gravity
*Dload
, GRAV, 9.81, 0., -1.
**
** OUTPUT REQUESTS
**
** *Restart, write, frequency=1
**
** FIELD OUTPUT: F-Output-1
**
*Output, field
*Node Output
CF, COORD, POR, RF, U
*Element Output, directions=YES
FLUVR, LE, S, SAT, VOIDR
*Contact Output
CDISP, CSTRESS, PFL
**
** HISTORY OUTPUT: H-Output-1
**
*Output, history, variable=PRESELECT
*EL FILE, frequency=10000
COORD, VOIDR, POR
*NODE FILE
COORD
*End Step
** ----------------------------------------------------------------
**
** STEP: Step_PPChange
**
*Step, name=Step_PPChange, nlgeom=NO, amplitude=RAMP, inc=10000
*Soils, consolidation, end=PERIOD, utol=50000., creep=none
6000., 43200., 1e-05, 6000.,
**
** BOUNDARY CONDITIONS
**
** Name: BC_PP Type: Pore pressure
*BOUNDARY,USER
_PickedSet49_PP_, 8
**
** OUTPUT REQUESTS
**
** *Restart, write, frequency=1
**
** FIELD OUTPUT: F-Output-1
**
*Output, field
*Node Output
CF, COORD, POR, RF, U
*Element Output, directions=YES
FLUVR, LE, S, SAT, VOIDR, NFORC
*Contact Output
CDISP, CSTRESS, PFL
**
** HISTORY OUTPUT: H-Output-1
**
*Output, history, variable=PRESELECT
*End Step
